*Heading
** Job name: Job-4 Model name: all_steps_2
** Generated by: Abaqus/CAE 2022
*Preprint, echo=NO, model=NO, history=NO, contact=NO
**
** PARTS
**
*Part, name=P0_5MM
*Node
      1, 0.000500000024,           0.,           0.
      2, 0.000500000024,           0., 0.00100000005
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*Element, type=C3D8T
  1,   3,   4,   2,   1,   7,   8,   6,   5
  2,   7,   8,   6,   5,  11,  12,  10,   9
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*Nset, nset=Set-45, generate
   1,  804,    1
*Elset, elset=Set-45, generate
   1,  200,    1
*Elset, elset=Set-2, generate
  6,  10,   1
*Elset, elset=Set-3, generate
 11,  15,   1
*Elset, elset=Set-4, generate
 16,  20,   1
*Elset, elset=Set-5, generate
 21,  25,   1
*Elset, elset=Set-6, generate
 26,  30,   1
*Elset, elset=Set-7, generate
 31,  35,   1
*Elset, elset=Set-8, generate
 36,  40,   1
*Elset, elset=Set-9, generate
 41,  45,   1
*Elset, elset=Set-10, generate
 46,  50,   1
*Elset, elset=Set-11, generate
 51,  55,   1
*Elset, elset=Set-12, generate
 56,  60,   1
*Elset, elset=Set-13, generate
 61,  65,   1
*Elset, elset=Set-14, generate
 66,  70,   1
*Elset, elset=Set-15, generate
 71,  75,   1
*Elset, elset=Set-16, generate
 76,  80,   1
*Elset, elset=Set-17, generate
 81,  85,   1
*Elset, elset=Set-18, generate
 86,  90,   1
*Elset, elset=Set-19, generate
 91,  95,   1
*Elset, elset=Set-20, generate
  96,  100,    1
*Elset, elset=Set-21, generate
 101,  105,    1
*Elset, elset=Set-22, generate
 106,  110,    1
*Elset, elset=Set-23, generate
 111,  115,    1
*Elset, elset=Set-24, generate
 116,  120,    1
*Elset, elset=Set-25, generate
 121,  125,    1
*Elset, elset=Set-26, generate
 126,  130,    1
*Elset, elset=Set-27, generate
 131,  135,    1
*Elset, elset=Set-28, generate
 136,  140,    1
*Elset, elset=Set-29, generate
 141,  145,    1
*Elset, elset=Set-30, generate
 146,  150,    1
*Elset, elset=Set-31, generate
 151,  155,    1
*Elset, elset=Set-32, generate
 156,  160,    1
*Elset, elset=Set-33, generate
 161,  165,    1
*Elset, elset=Set-34, generate
 166,  170,    1
*Elset, elset=Set-35, generate
 171,  175,    1
*Elset, elset=Set-36, generate
 176,  180,    1
*Elset, elset=Set-37, generate
 181,  185,    1
*Elset, elset=Set-38, generate
 186,  190,    1
*Elset, elset=Set-39, generate
 191,  195,    1
*Elset, elset=Set-40, generate
 196,  200,    1
*Elset, elset=Set-1, generate
 1,  5,  1
** Section: Section-1-SET-1
*Solid Section, elset=Set-45, material=A6061
,
*End Part
**
*Part, name=P4_19
*Node
      1,  0.200000003,           0.,           0.
      2,  0.200000003, 0.00320764165, 1.31912038e-05
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*Element, type=C3D8T
   1,   50,   51,    2,    1,  148,  149,  100,   99
   2,   51,   52,    3,    2,  149,  150,  101,  100
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*Nset, nset=Set-1, generate
    1,  6958,     1
*Elset, elset=Set-1, generate
    1,  3360,     1
*Nset, nset=all_1, generate
    1,  6958,     1
*Elset, elset=all_1, generate
    1,  3360,     1
*Elset, elset=all, generate
    1,  3360,     1
** Section: Section-1-SET-1
*Solid Section, elset=Set-1, material=A6061
,
*End Part
**
**
** ASSEMBLY
**
*Assembly, name=Assembly
**
*Instance, name=P4_19-1, part=P4_19
          0.,      0.00025,           0.
*End Instance
**
*Instance, name=P4_19-2, part=P4_19
         0.2,     -0.00025,       0.0005
         0.2,     -0.00025,       0.0005,          0.2,     -0.00025,       1.0005,         180.
*End Instance
**
*Instance, name=P0_5MM-1, part=P0_5MM
          0.,      0.00025,           0.
          0.,      0.00025,           0.,           0.,      0.00025, -1.00000001268805, 89.9999992730282
*End Instance
**
*Elset, elset=Set-13, instance=P4_19-2
    1,    2,    3,    4,   49,   50
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*Nset, nset=Set-21, instance=P4_19-2, generate
   49,  6958,    49
*Elset, elset=Set-21, instance=P4_19-2, generate
   48,  3360,    48
*Nset, nset=Set-22, instance=P4_19-2, generate
    1,  6910,    49
*Elset, elset=Set-22, instance=P4_19-2, generate
    1,  3313,    48
*Nset, nset=Set-23, instance=P4_19-1, generate
   49,  6958,    49
*Elset, elset=Set-23, instance=P4_19-1, generate
   48,  3360,    48
*Nset, nset=Set-24, instance=P4_19-1
    1,    2,    3,    4,    5,    6
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*Nset, nset=Set-24, instance=P4_19-2
    1,    2,    3,    4,    5,    6
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*Elset, elset=Set-24, instance=P4_19-1
    1,    2,    3,    4,    5,    6
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*Elset, elset=Set-24, instance=P4_19-2
    1,    2,    3,    4,    5,    6
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*Nset, nset=Set-29, instance=P4_19-1, generate
    1,  6910,    49
*Elset, elset=Set-29, instance=P4_19-1, generate
    1,  3313,    48
*Nset, nset=Set-30, instance=P4_19-2, generate
    1,  6910,    49
*Elset, elset=Set-30, instance=P4_19-2, generate
    1,  3313,    48
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*Elset, elset=Set-31, instance=P4_19-1, generate
    1,  3360,     1
*Elset, elset=Set-31, instance=P4_19-2, generate
    1,  3360,     1
*Nset, nset=Set-32, instance=P0_5MM-1, generate
   1,  803,    2
*Elset, elset=Set-32, instance=P0_5MM-1, generate
   1,  200,    1
*Nset, nset=all, instance=P4_19-1, generate
    1,  6958,     1
*Nset, nset=all, instance=P4_19-2, generate
    1,  6958,     1
*Nset, nset=all, instance=P0_5MM-1, generate
   1,  804,    1
*Elset, elset=all, instance=P4_19-1, generate
    1,  3360,     1
*Elset, elset=all, instance=P4_19-2, generate
    1,  3360,     1
*Elset, elset=all, instance=P0_5MM-1, generate
   1,  200,    1
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*Elset, elset=all_1, instance=P4_19-1, generate
    1,  3360,     1
*Elset, elset=all_1, instance=P4_19-2, generate
    1,  3360,     1
*Elset, elset=all_1, instance=P0_5MM-1, generate
   1,  200,    1
*Nset, nset=bottom, instance=P4_19-2
    1,    2,    3,    4,    5,    6
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*Elset, elset=bottom, instance=P4_19-2, generate
    1,  3360,     1
*Nset, nset=center, instance=P4_19-1
    1,   50,   99,  148,  197,  246
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*Nset, nset=center, instance=P4_19-2
    1,   50,   99,  148,  197,  246
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*Nset, nset=center, instance=P0_5MM-1
  69,  71,  73,  74,  75,  76
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*Nset, nset=fixed-re, instance=P4_19-2
   49,   98,  147,  196,  245,  294
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*Nset, nset=fixed-re, instance=P4_19-1
   49,   98,  147,  196,  245,  294
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*Elset, elset=weld, instance=P0_5MM-1, generate
   1,  200,    1
*Elset, elset=_all_S5_1, internal, instance=P4_19-1, generate
    1,  3360,     1
*Elset, elset=_all_S5_1, internal, instance=P4_19-2, generate
    1,  3360,     1
*Elset, elset=_all_S5_1, internal, instance=P0_5MM-1, generate
   1,  200,    1
*Elset, elset=_all_S6_1, internal, instance=P4_19-1, generate
    1,  3313,    48
*Elset, elset=_all_S6_1, internal, instance=P4_19-2, generate
    1,  3313,    48
*Elset, elset=_all_S6_1, internal, instance=P0_5MM-1, generate
   1,  200,    1
*Elset, elset=_all_S3_1, internal, instance=P4_19-1, generate
    1,  3360,     1
*Elset, elset=_all_S3_1, internal, instance=P4_19-2, generate
    1,  3360,     1
*Elset, elset=_all_S3_1, internal, instance=P0_5MM-1, generate
   1,  200,    1
*Elset, elset=_all_S4_1, internal, instance=P4_19-1, generate
   48,  3360,    48
*Elset, elset=_all_S4_1, internal, instance=P0_5MM-1, generate
   1,  200,    1
*Elset, elset=_all_S1_1, internal, instance=P4_19-1, generate
  1,  48,   1
*Elset, elset=_all_S1_1, internal, instance=P4_19-2, generate
  1,  48,   1
*Elset, elset=_all_S1_1, internal, instance=P0_5MM-1
 1,
*Elset, elset=_all_S2_1, internal, instance=P4_19-1, generate
 3313,  3360,     1
*Elset, elset=_all_S2_1, internal, instance=P4_19-2, generate
 3313,  3360,     1
*Elset, elset=_all_S2_1, internal, instance=P0_5MM-1
 200,
*Surface, type=ELEMENT, name=all
_all_S5_1, S5
_all_S6_1, S6
_all_S4_1, S4
_all_S2_1, S2
_all_S3_1, S3
_all_S1_1, S1
*Elset, elset=_m-surf1_S5, internal, instance=P0_5MM-1, generate
   1,  200,    1
*Surface, type=ELEMENT, name=m-surf1
_m-surf1_S5, S5
*Elset, elset=_m-surf2_S3, internal, instance=P0_5MM-1, generate
   1,  200,    1
*Surface, type=ELEMENT, name=m-surf2
_m-surf2_S3, S3
*Elset, elset=_s-surf1_S6, internal, instance=P4_19-2, generate
    1,  3313,    48
*Surface, type=ELEMENT, name=s-surf1
_s-surf1_S6, S6
*Elset, elset=_s-surf2_S6, internal, instance=P4_19-1, generate
    1,  3313,    48
*Surface, type=ELEMENT, name=s-surf2
_s-surf2_S6, S6
*End Assembly
**
** MATERIALS
**
*Material, name=A6061
*Conductivity
 50.,  20.
 49., 100.
 47., 250.
 40., 500.
 27., 750.
 30.,1000.
 35.,1500.
145.,2000.
*Density
7850.,  20.
7850., 100.
7850., 250.
7850., 500.
7850., 750.
7850.,1000.
7850.,1500.
7859.,2000.
*Elastic
 2.05e+11, 0.28,  20.
 1.97e+11, 0.28, 100.
 1.87e+11, 0.29, 250.
  1.5e+11, 0.31, 500.
    7e+10, 0.35, 750.
    2e+10,  0.4,1000.
    1e+08, 0.45,1500.
    1e+06, 0.48,2000.
*Expansion
  1.1e-05,  20.
 1.05e-06, 100.
 1.22e-05, 250.
 1.39e-05, 500.
 1.48e-05, 750.
 1.35e-05,1000.
 1.33e-05,1500.
 1.31e-05,2000.
*Plastic
 3.45e+08,   0.,  20.
  3.1e+08,   0., 100.
 2.75e+08,   0., 250.
  2.4e+08,   0., 500.
    4e+07,   0., 750.
    2e+07,   0.,1000.
    1e+06,   0.,1500.
    1e+06,   0.,2000.
*Specific Heat
460.,  20.
465., 100.
480., 250.
575., 500.
625., 750.
675.,1000.
650.,1500.
820.,2000.
**
** INTERACTION PROPERTIES
**
*Surface Interaction, name=INTPROP-1
1.,
*Friction, rough
*Surface Behavior, no separation, pressure-overclosure=HARD
**
** PHYSICAL CONSTANTS
**
*Physical Constants, absolute zero=-273.15, stefan boltzmann=5.67e-08
**
** PREDEFINED FIELDS
**
** Name: Field-1   Type: Temperature
*Initial Conditions, type=TEMPERATURE
all, 20.
** ----------------------------------------------------------------
**
** STEP: Step-0
**
*Step, name=Step-0, nlgeom=YES, inc=10000
*Coupled Temperature-displacement, creep=none, deltmx=2000.
1e-10, 1e-10, 1e-15, 1e-10
**
** INTERACTIONS
**
** Interaction: Int-0
*Model Change, remove
weld,
**
** OUTPUT REQUESTS
**
*Restart, write, frequency=0
**
** FIELD OUTPUT: F-Output-1
**
*Output, field
*Node Output
NT, RFL, U
*Element Output, directions=YES
HFL, S
*Contact Output
CDISP, CSTRESS
**
** HISTORY OUTPUT: H-Output-1
**
*Output, history, variable=PRESELECT
*End Step
** ----------------------------------------------------------------
**
** STEP: flatten
**
*Step, name=flatten, nlgeom=YES, inc=10000
*Coupled Temperature-displacement, creep=none, deltmx=10000.
0.01, 1., 1e-10, 1.
**
** BOUNDARY CONDITIONS
**
** Name: fixed Type: Displacement/Rotation
*Boundary
fixed-re, 1, 1
fixed-re, 2, 2
fixed-re, 3, 3
** Name: side-weld-1 Type: Displacement/Rotation
*Boundary
Set-29, 3, 3
** Name: side-weld-2 Type: Displacement/Rotation
*Boundary
Set-30, 3, 3, -0.0005
** Name: weld Type: Displacement/Rotation
*Boundary
Set-32, 1, 1
Set-32, 2, 2
Set-32, 3, 3
**
** OUTPUT REQUESTS
**
*Restart, write, frequency=0
**
** FIELD OUTPUT: F-Output-1
**
*Output, field
*Node Output
NT, RFL, U
*Element Output, directions=YES
HFL, S
*Contact Output
CDISP, CSTRESS
**
** HISTORY OUTPUT: H-Output-1
**
*Output, history, variable=PRESELECT
*End Step
** ----------------------------------------------------------------
**
** STEP: Step-1
**
*Step, name=Step-1, nlgeom=YES, inc=10000
*Coupled Temperature-displacement, creep=none, deltmx=2000.
0.001, 0.125, 1e-07, 0.1
**
** LOADS
**
** Name: souurce   Type: Body heat flux
*Dflux
all_1, BFNU, 1.
**
** INTERACTIONS
**
** Interaction: Int-1
*Model Change, add
P0_5MM-1.Set-1,
** Interaction: Int-flim
*Sfilm
all, F, 20., 10.
** Interaction: Int-radia
*Sradiate
all, R, 0., 0.85
**
** OUTPUT REQUESTS
**
*Restart, write, frequency=0
**
** FIELD OUTPUT: F-Output-1
**
*Output, field
*Node Output
NT, RFL, U
*Element Output, directions=YES
HFL, S
*Contact Output
CDISP, CSTRESS
**
** HISTORY OUTPUT: H-Output-1
**
*Output, history, variable=PRESELECT
*End Step
** ----------------------------------------------------------------
**
** STEP: Step-2
**
*Step, name=Step-2, nlgeom=YES, inc=10000
*Coupled Temperature-displacement, creep=none, deltmx=2000.
0.001, 0.125, 1e-07, 0.1
**
** INTERACTIONS
**
** Interaction: Int-2
*Model Change, add
P0_5MM-1.Set-2,
**
** OUTPUT REQUESTS
**
*Restart, write, frequency=0
**
** FIELD OUTPUT: F-Output-1
**
*Output, field
*Node Output
NT, RFL, U
*Element Output, directions=YES
HFL, S
*Contact Output
CDISP, CSTRESS
**
** HISTORY OUTPUT: H-Output-1
**
*Output, history, variable=PRESELECT
*End Step
** ----------------------------------------------------------------
**
** STEP: Step-3
**
*Step, name=Step-3, nlgeom=YES, inc=10000
*Coupled Temperature-displacement, creep=none, deltmx=2000.
0.001, 0.125, 1e-07, 0.1
**
** INTERACTIONS
**
** Interaction: Int-3
*Model Change, add
P0_5MM-1.Set-3,
**
** OUTPUT REQUESTS
**
*Restart, write, frequency=0
**
** FIELD OUTPUT: F-Output-1
**
*Output, field
*Node Output
NT, RFL, U
*Element Output, directions=YES
HFL, S
*Contact Output
CDISP, CSTRESS
**
** HISTORY OUTPUT: H-Output-1
**
*Output, history, variable=PRESELECT
*End Step
** ----------------------------------------------------------------
**
** STEP: Step-4
**
*Step, name=Step-4, nlgeom=YES, inc=10000
*Coupled Temperature-displacement, creep=none, deltmx=2000.
0.001, 0.125, 1e-07, 0.1
**
** INTERACTIONS
**
** Interaction: Int-4
*Model Change, add
P0_5MM-1.Set-4,
**
** OUTPUT REQUESTS
**
*Restart, write, frequency=0
**
** FIELD OUTPUT: F-Output-1
**
*Output, field
*Node Output
NT, RFL, U
*Element Output, directions=YES
HFL, S
*Contact Output
CDISP, CSTRESS
**
** HISTORY OUTPUT: H-Output-1
**
*Output, history, variable=PRESELECT
*End Step
** ----------------------------------------------------------------
**
** STEP: Step-5
**
*Step, name=Step-5, nlgeom=YES, inc=10000
*Coupled Temperature-displacement, creep=none, deltmx=2000.
0.001, 0.125, 1e-07, 0.1
**
** INTERACTIONS
**
** Interaction: Int-5
*Model Change, add
P0_5MM-1.Set-5,
**
** OUTPUT REQUESTS
**
*Restart, write, frequency=0
**
** FIELD OUTPUT: F-Output-1
**
*Output, field
*Node Output
NT, RFL, U
*Element Output, directions=YES
HFL, S
*Contact Output
CDISP, CSTRESS
**
** HISTORY OUTPUT: H-Output-1
**
*Output, history, variable=PRESELECT
*End Step
** ----------------------------------------------------------------
**
** STEP: Step-6
**
*Step, name=Step-6, nlgeom=YES, inc=10000
*Coupled Temperature-displacement, creep=none, deltmx=2000.
0.001, 0.125, 1e-07, 0.1
**
** INTERACTIONS
**
** Interaction: Int-6
*Model Change, add
P0_5MM-1.Set-6,
**
** OUTPUT REQUESTS
**
*Restart, write, frequency=0
**
** FIELD OUTPUT: F-Output-1
**
*Output, field
*Node Output
NT, RFL, U
*Element Output, directions=YES
HFL, S
*Contact Output
CDISP, CSTRESS
**
** HISTORY OUTPUT: H-Output-1
**
*Output, history, variable=PRESELECT
*End Step
** ----------------------------------------------------------------
**
** STEP: Step-7
**
*Step, name=Step-7, nlgeom=YES, inc=10000
*Coupled Temperature-displacement, creep=none, deltmx=2000.
0.001, 0.125, 1e-07, 0.1
**
** INTERACTIONS
**
** Interaction: Int-7
*Model Change, add
P0_5MM-1.Set-7,
**
** OUTPUT REQUESTS
**
*Restart, write, frequency=0
**
** FIELD OUTPUT: F-Output-1
**
*Output, field
*Node Output
NT, RFL, U
*Element Output, directions=YES
HFL, S
*Contact Output
CDISP, CSTRESS
**
** HISTORY OUTPUT: H-Output-1
**
*Output, history, variable=PRESELECT
*End Step
** ----------------------------------------------------------------
**
** STEP: Step-8
**
*Step, name=Step-8, nlgeom=YES, inc=10000
*Coupled Temperature-displacement, creep=none, deltmx=2000.
0.001, 0.125, 1e-07, 0.1
**
** INTERACTIONS
**
** Interaction: Int-8
*Model Change, add
P0_5MM-1.Set-8,
**
** OUTPUT REQUESTS
**
*Restart, write, frequency=0
**
** FIELD OUTPUT: F-Output-1
**
*Output, field
*Node Output
NT, RFL, U
*Element Output, directions=YES
HFL, S
*Contact Output
CDISP, CSTRESS
**
** HISTORY OUTPUT: H-Output-1
**
*Output, history, variable=PRESELECT
*End Step
** ----------------------------------------------------------------
**
** STEP: Step-9
**
*Step, name=Step-9, nlgeom=YES, inc=10000
*Coupled Temperature-displacement, creep=none, deltmx=2000.
0.001, 0.125, 1e-07, 0.1
**
** INTERACTIONS
**
** Interaction: Int-9
*Model Change, add
P0_5MM-1.Set-9,
**
** OUTPUT REQUESTS
**
*Restart, write, frequency=0
**
** FIELD OUTPUT: F-Output-1
**
*Output, field
*Node Output
NT, RFL, U
*Element Output, directions=YES
HFL, S
*Contact Output
CDISP, CSTRESS
**
** HISTORY OUTPUT: H-Output-1
**
*Output, history, variable=PRESELECT
*End Step
** ----------------------------------------------------------------
**
** STEP: Step-10
**
*Step, name=Step-10, nlgeom=YES, inc=10000
*Coupled Temperature-displacement, creep=none, deltmx=2000.
0.001, 0.125, 1e-07, 0.1
**
** INTERACTIONS
**
** Interaction: Int-10
*Model Change, add
P0_5MM-1.Set-10,
**
** OUTPUT REQUESTS
**
*Restart, write, frequency=0
**
** FIELD OUTPUT: F-Output-1
**
*Output, field
*Node Output
NT, RFL, U
*Element Output, directions=YES
HFL, S
*Contact Output
CDISP, CSTRESS
**
** HISTORY OUTPUT: H-Output-1
**
*Output, history, variable=PRESELECT
*End Step
** ----------------------------------------------------------------
**
** STEP: Step-11
**
*Step, name=Step-11, nlgeom=YES, inc=10000
*Coupled Temperature-displacement, creep=none, deltmx=2000.
0.001, 0.125, 1e-07, 0.1
**
** INTERACTIONS
**
** Interaction: Int-11
*Model Change, add
P0_5MM-1.Set-11,
**
** OUTPUT REQUESTS
**
*Restart, write, frequency=0
**
** FIELD OUTPUT: F-Output-1
**
*Output, field
*Node Output
NT, RFL, U
*Element Output, directions=YES
HFL, S
*Contact Output
CDISP, CSTRESS
**
** HISTORY OUTPUT: H-Output-1
**
*Output, history, variable=PRESELECT
*End Step
** ----------------------------------------------------------------
**
** STEP: Step-12
**
*Step, name=Step-12, nlgeom=YES, inc=10000
*Coupled Temperature-displacement, creep=none, deltmx=2000.
0.001, 0.125, 1e-07, 0.1
**
** INTERACTIONS
**
** Interaction: Int-12
*Model Change, add
P0_5MM-1.Set-12,
**
** OUTPUT REQUESTS
**
*Restart, write, frequency=0
**
** FIELD OUTPUT: F-Output-1
**
*Output, field
*Node Output
NT, RFL, U
*Element Output, directions=YES
HFL, S
*Contact Output
CDISP, CSTRESS
**
** HISTORY OUTPUT: H-Output-1
**
*Output, history, variable=PRESELECT
*End Step
** ----------------------------------------------------------------
**
** STEP: Step-13
**
*Step, name=Step-13, nlgeom=YES, inc=10000
*Coupled Temperature-displacement, creep=none, deltmx=2000.
0.001, 0.125, 1e-07, 0.1
**
** INTERACTIONS
**
** Interaction: Int-13
*Model Change, add
P0_5MM-1.Set-13,
**
** OUTPUT REQUESTS
**
*Restart, write, frequency=0
**
** FIELD OUTPUT: F-Output-1
**
*Output, field
*Node Output
NT, RFL, U
*Element Output, directions=YES
HFL, S
*Contact Output
CDISP, CSTRESS
**
** HISTORY OUTPUT: H-Output-1
**
*Output, history, variable=PRESELECT
*End Step
** ----------------------------------------------------------------
**
** STEP: Step-14
**
*Step, name=Step-14, nlgeom=YES, inc=10000
*Coupled Temperature-displacement, creep=none, deltmx=2000.
0.001, 0.125, 1e-07, 0.1
**
** INTERACTIONS
**
** Interaction: Int-14
*Model Change, add
P0_5MM-1.Set-14,
**
** OUTPUT REQUESTS
**
*Restart, write, frequency=0
**
** FIELD OUTPUT: F-Output-1
**
*Output, field
*Node Output
NT, RFL, U
*Element Output, directions=YES
HFL, S
*Contact Output
CDISP, CSTRESS
**
** HISTORY OUTPUT: H-Output-1
**
*Output, history, variable=PRESELECT
*End Step
** ----------------------------------------------------------------
**
** STEP: Step-15
**
*Step, name=Step-15, nlgeom=YES, inc=10000
*Coupled Temperature-displacement, creep=none, deltmx=2000.
0.001, 0.125, 1e-07, 0.1
**
** INTERACTIONS
**
** Interaction: Int-15
*Model Change, add
P0_5MM-1.Set-15,
**
** OUTPUT REQUESTS
**
*Restart, write, frequency=0
**
** FIELD OUTPUT: F-Output-1
**
*Output, field
*Node Output
NT, RFL, U
*Element Output, directions=YES
HFL, S
*Contact Output
CDISP, CSTRESS
**
** HISTORY OUTPUT: H-Output-1
**
*Output, history, variable=PRESELECT
*End Step
** ----------------------------------------------------------------
**
** STEP: Step-16
**
*Step, name=Step-16, nlgeom=YES, inc=10000
*Coupled Temperature-displacement, creep=none, deltmx=2000.
0.001, 0.125, 1e-07, 0.1
**
** INTERACTIONS
**
** Interaction: Int-16
*Model Change, add
P0_5MM-1.Set-16,
**
** OUTPUT REQUESTS
**
*Restart, write, frequency=0
**
** FIELD OUTPUT: F-Output-1
**
*Output, field
*Node Output
NT, RFL, U
*Element Output, directions=YES
HFL, S
*Contact Output
CDISP, CSTRESS
**
** HISTORY OUTPUT: H-Output-1
**
*Output, history, variable=PRESELECT
*End Step
** ----------------------------------------------------------------
**
** STEP: Step-17
**
*Step, name=Step-17, nlgeom=YES, inc=10000
*Coupled Temperature-displacement, creep=none, deltmx=2000.
0.001, 0.125, 1e-07, 0.1
**
** INTERACTIONS
**
** Interaction: Int-17
*Model Change, add
P0_5MM-1.Set-17,
**
** OUTPUT REQUESTS
**
*Restart, write, frequency=0
**
** FIELD OUTPUT: F-Output-1
**
*Output, field
*Node Output
NT, RFL, U
*Element Output, directions=YES
HFL, S
*Contact Output
CDISP, CSTRESS
**
** HISTORY OUTPUT: H-Output-1
**
*Output, history, variable=PRESELECT
*End Step
** ----------------------------------------------------------------
**
** STEP: Step-18
**
*Step, name=Step-18, nlgeom=YES, inc=10000
*Coupled Temperature-displacement, creep=none, deltmx=2000.
0.001, 0.125, 1e-07, 0.1
**
** INTERACTIONS
**
** Interaction: Int-18
*Model Change, add
P0_5MM-1.Set-18,
**
** OUTPUT REQUESTS
**
*Restart, write, frequency=0
**
** FIELD OUTPUT: F-Output-1
**
*Output, field
*Node Output
NT, RFL, U
*Element Output, directions=YES
HFL, S
*Contact Output
CDISP, CSTRESS
**
** HISTORY OUTPUT: H-Output-1
**
*Output, history, variable=PRESELECT
*End Step
** ----------------------------------------------------------------
**
** STEP: Step-19
**
*Step, name=Step-19, nlgeom=YES, inc=10000
*Coupled Temperature-displacement, creep=none, deltmx=2000.
0.001, 0.125, 1e-07, 0.1
**
** INTERACTIONS
**
** Interaction: Int-19
*Model Change, add
P0_5MM-1.Set-19,
**
** OUTPUT REQUESTS
**
*Restart, write, frequency=0
**
** FIELD OUTPUT: F-Output-1
**
*Output, field
*Node Output
NT, RFL, U
*Element Output, directions=YES
HFL, S
*Contact Output
CDISP, CSTRESS
**
** HISTORY OUTPUT: H-Output-1
**
*Output, history, variable=PRESELECT
*End Step
** ----------------------------------------------------------------
**
** STEP: Step-20
**
*Step, name=Step-20, nlgeom=YES, inc=10000
*Coupled Temperature-displacement, creep=none, deltmx=2000.
0.001, 0.125, 1e-07, 0.1
**
** INTERACTIONS
**
** Interaction: Int-20
*Model Change, add
P0_5MM-1.Set-20,
**
** OUTPUT REQUESTS
**
*Restart, write, frequency=0
**
** FIELD OUTPUT: F-Output-1
**
*Output, field
*Node Output
NT, RFL, U
*Element Output, directions=YES
HFL, S
*Contact Output
CDISP, CSTRESS
**
** HISTORY OUTPUT: H-Output-1
**
*Output, history, variable=PRESELECT
*End Step
** ----------------------------------------------------------------
**
** STEP: Step-21
**
*Step, name=Step-21, nlgeom=YES, inc=10000
*Coupled Temperature-displacement, creep=none, deltmx=2000.
0.001, 0.125, 1e-07, 0.1
**
** INTERACTIONS
**
** Interaction: Int-21
*Model Change, add
P0_5MM-1.Set-21,
**
** OUTPUT REQUESTS
**
*Restart, write, frequency=0
**
** FIELD OUTPUT: F-Output-1
**
*Output, field
*Node Output
NT, RFL, U
*Element Output, directions=YES
HFL, S
*Contact Output
CDISP, CSTRESS
**
** HISTORY OUTPUT: H-Output-1
**
*Output, history, variable=PRESELECT
*End Step
** ----------------------------------------------------------------
**
** STEP: Step-22
**
*Step, name=Step-22, nlgeom=YES, inc=10000
*Coupled Temperature-displacement, creep=none, deltmx=2000.
0.001, 0.125, 1e-07, 0.1
**
** INTERACTIONS
**
** Interaction: Int-22
*Model Change, add
P0_5MM-1.Set-22,
**
** OUTPUT REQUESTS
**
*Restart, write, frequency=0
**
** FIELD OUTPUT: F-Output-1
**
*Output, field
*Node Output
NT, RFL, U
*Element Output, directions=YES
HFL, S
*Contact Output
CDISP, CSTRESS
**
** HISTORY OUTPUT: H-Output-1
**
*Output, history, variable=PRESELECT
*End Step
** ----------------------------------------------------------------
**
** STEP: Step-23
**
*Step, name=Step-23, nlgeom=YES, inc=10000
*Coupled Temperature-displacement, creep=none, deltmx=2000.
0.001, 0.125, 1e-07, 0.1
**
** INTERACTIONS
**
** Interaction: Int-23
*Model Change, add
P0_5MM-1.Set-23,
**
** OUTPUT REQUESTS
**
*Restart, write, frequency=0
**
** FIELD OUTPUT: F-Output-1
**
*Output, field
*Node Output
NT, RFL, U
*Element Output, directions=YES
HFL, S
*Contact Output
CDISP, CSTRESS
**
** HISTORY OUTPUT: H-Output-1
**
*Output, history, variable=PRESELECT
*End Step
** ----------------------------------------------------------------
**
** STEP: Step-24
**
*Step, name=Step-24, nlgeom=YES, inc=10000
*Coupled Temperature-displacement, creep=none, deltmx=2000.
0.001, 0.125, 1e-07, 0.1
**
** INTERACTIONS
**
** Interaction: Int-24
*Model Change, add
P0_5MM-1.Set-24,
**
** OUTPUT REQUESTS
**
*Restart, write, frequency=0
**
** FIELD OUTPUT: F-Output-1
**
*Output, field
*Node Output
NT, RFL, U
*Element Output, directions=YES
HFL, S
*Contact Output
CDISP, CSTRESS
**
** HISTORY OUTPUT: H-Output-1
**
*Output, history, variable=PRESELECT
*End Step
** ----------------------------------------------------------------
**
** STEP: Step-25
**
*Step, name=Step-25, nlgeom=YES, inc=10000
*Coupled Temperature-displacement, creep=none, deltmx=2000.
0.001, 0.125, 1e-07, 0.1
**
** INTERACTIONS
**
** Interaction: Int-25
*Model Change, add
P0_5MM-1.Set-25,
**
** OUTPUT REQUESTS
**
*Restart, write, frequency=0
**
** FIELD OUTPUT: F-Output-1
**
*Output, field
*Node Output
NT, RFL, U
*Element Output, directions=YES
HFL, S
*Contact Output
CDISP, CSTRESS
**
** HISTORY OUTPUT: H-Output-1
**
*Output, history, variable=PRESELECT
*End Step
** ----------------------------------------------------------------
**
** STEP: Step-26
**
*Step, name=Step-26, nlgeom=YES, inc=10000
*Coupled Temperature-displacement, creep=none, deltmx=2000.
0.001, 0.125, 1e-07, 0.1
**
** INTERACTIONS
**
** Interaction: Int-26
*Model Change, add
P0_5MM-1.Set-26,
**
** OUTPUT REQUESTS
**
*Restart, write, frequency=0
**
** FIELD OUTPUT: F-Output-1
**
*Output, field
*Node Output
NT, RFL, U
*Element Output, directions=YES
HFL, S
*Contact Output
CDISP, CSTRESS
**
** HISTORY OUTPUT: H-Output-1
**
*Output, history, variable=PRESELECT
*End Step
** ----------------------------------------------------------------
**
** STEP: Step-27
**
*Step, name=Step-27, nlgeom=YES, inc=10000
*Coupled Temperature-displacement, creep=none, deltmx=2000.
0.001, 0.125, 1e-07, 0.1
**
** INTERACTIONS
**
** Interaction: Int-27
*Model Change, add
P0_5MM-1.Set-27,
**
** OUTPUT REQUESTS
**
*Restart, write, frequency=0
**
** FIELD OUTPUT: F-Output-1
**
*Output, field
*Node Output
NT, RFL, U
*Element Output, directions=YES
HFL, S
*Contact Output
CDISP, CSTRESS
**
** HISTORY OUTPUT: H-Output-1
**
*Output, history, variable=PRESELECT
*End Step
** ----------------------------------------------------------------
**
** STEP: Step-28
**
*Step, name=Step-28, nlgeom=YES, inc=10000
*Coupled Temperature-displacement, creep=none, deltmx=2000.
0.001, 0.125, 1e-07, 0.1
**
** INTERACTIONS
**
** Interaction: Int-28
*Model Change, add
P0_5MM-1.Set-28,
**
** OUTPUT REQUESTS
**
*Restart, write, frequency=0
**
** FIELD OUTPUT: F-Output-1
**
*Output, field
*Node Output
NT, RFL, U
*Element Output, directions=YES
HFL, S
*Contact Output
CDISP, CSTRESS
**
** HISTORY OUTPUT: H-Output-1
**
*Output, history, variable=PRESELECT
*End Step
** ----------------------------------------------------------------
**
** STEP: Step-29
**
*Step, name=Step-29, nlgeom=YES, inc=10000
*Coupled Temperature-displacement, creep=none, deltmx=2000.
0.001, 0.125, 1e-07, 0.1
**
** INTERACTIONS
**
** Interaction: Int-29
*Model Change, add
P0_5MM-1.Set-29,
**
** OUTPUT REQUESTS
**
*Restart, write, frequency=0
**
** FIELD OUTPUT: F-Output-1
**
*Output, field
*Node Output
NT, RFL, U
*Element Output, directions=YES
HFL, S
*Contact Output
CDISP, CSTRESS
**
** HISTORY OUTPUT: H-Output-1
**
*Output, history, variable=PRESELECT
*End Step
** ----------------------------------------------------------------
**
** STEP: Step-30
**
*Step, name=Step-30, nlgeom=YES, inc=10000
*Coupled Temperature-displacement, creep=none, deltmx=2000.
0.001, 0.125, 1e-07, 0.1
**
** INTERACTIONS
**
** Interaction: Int-30
*Model Change, add
P0_5MM-1.Set-30,
**
** OUTPUT REQUESTS
**
*Restart, write, frequency=0
**
** FIELD OUTPUT: F-Output-1
**
*Output, field
*Node Output
NT, RFL, U
*Element Output, directions=YES
HFL, S
*Contact Output
CDISP, CSTRESS
**
** HISTORY OUTPUT: H-Output-1
**
*Output, history, variable=PRESELECT
*End Step
** ----------------------------------------------------------------
**
** STEP: Step-31
**
*Step, name=Step-31, nlgeom=YES, inc=10000
*Coupled Temperature-displacement, creep=none, deltmx=2000.
0.001, 0.125, 1e-07, 0.1
**
** INTERACTIONS
**
** Interaction: Int-31
*Model Change, add
P0_5MM-1.Set-31,
**
** OUTPUT REQUESTS
**
*Restart, write, frequency=0
**
** FIELD OUTPUT: F-Output-1
**
*Output, field
*Node Output
NT, RFL, U
*Element Output, directions=YES
HFL, S
*Contact Output
CDISP, CSTRESS
**
** HISTORY OUTPUT: H-Output-1
**
*Output, history, variable=PRESELECT
*End Step
** ----------------------------------------------------------------
**
** STEP: Step-32
**
*Step, name=Step-32, nlgeom=YES, inc=10000
*Coupled Temperature-displacement, creep=none, deltmx=2000.
0.001, 0.125, 1e-07, 0.1
**
** INTERACTIONS
**
** Interaction: Int-32
*Model Change, add
P0_5MM-1.Set-32,
**
** OUTPUT REQUESTS
**
*Restart, write, frequency=0
**
** FIELD OUTPUT: F-Output-1
**
*Output, field
*Node Output
NT, RFL, U
*Element Output, directions=YES
HFL, S
*Contact Output
CDISP, CSTRESS
**
** HISTORY OUTPUT: H-Output-1
**
*Output, history, variable=PRESELECT
*End Step
** ----------------------------------------------------------------
**
** STEP: Step-33
**
*Step, name=Step-33, nlgeom=YES, inc=10000
*Coupled Temperature-displacement, creep=none, deltmx=2000.
0.001, 0.125, 1e-07, 0.1
**
** INTERACTIONS
**
** Interaction: Int-33
*Model Change, add
P0_5MM-1.Set-33,
**
** OUTPUT REQUESTS
**
*Restart, write, frequency=0
**
** FIELD OUTPUT: F-Output-1
**
*Output, field
*Node Output
NT, RFL, U
*Element Output, directions=YES
HFL, S
*Contact Output
CDISP, CSTRESS
**
** HISTORY OUTPUT: H-Output-1
**
*Output, history, variable=PRESELECT
*End Step
** ----------------------------------------------------------------
**
** STEP: Step-34
**
*Step, name=Step-34, nlgeom=YES, inc=10000
*Coupled Temperature-displacement, creep=none, deltmx=2000.
0.001, 0.125, 1e-07, 0.1
**
** INTERACTIONS
**
** Interaction: Int-34
*Model Change, add
P0_5MM-1.Set-34,
**
** OUTPUT REQUESTS
**
*Restart, write, frequency=0
**
** FIELD OUTPUT: F-Output-1
**
*Output, field
*Node Output
NT, RFL, U
*Element Output, directions=YES
HFL, S
*Contact Output
CDISP, CSTRESS
**
** HISTORY OUTPUT: H-Output-1
**
*Output, history, variable=PRESELECT
*End Step
** ----------------------------------------------------------------
**
** STEP: Step-35
**
*Step, name=Step-35, nlgeom=YES, inc=10000
*Coupled Temperature-displacement, creep=none, deltmx=2000.
0.001, 0.125, 1e-07, 0.1
**
** INTERACTIONS
**
** Interaction: Int-35
*Model Change, add
P0_5MM-1.Set-35,
**
** OUTPUT REQUESTS
**
*Restart, write, frequency=0
**
** FIELD OUTPUT: F-Output-1
**
*Output, field
*Node Output
NT, RFL, U
*Element Output, directions=YES
HFL, S
*Contact Output
CDISP, CSTRESS
**
** HISTORY OUTPUT: H-Output-1
**
*Output, history, variable=PRESELECT
*End Step
** ----------------------------------------------------------------
**
** STEP: Step-36
**
*Step, name=Step-36, nlgeom=YES, inc=10000
*Coupled Temperature-displacement, creep=none, deltmx=2000.
0.001, 0.125, 1e-07, 0.1
**
** INTERACTIONS
**
** Interaction: Int-36
*Model Change, add
P0_5MM-1.Set-36,
**
** OUTPUT REQUESTS
**
*Restart, write, frequency=0
**
** FIELD OUTPUT: F-Output-1
**
*Output, field
*Node Output
NT, RFL, U
*Element Output, directions=YES
HFL, S
*Contact Output
CDISP, CSTRESS
**
** HISTORY OUTPUT: H-Output-1
**
*Output, history, variable=PRESELECT
*End Step
** ----------------------------------------------------------------
**
** STEP: Step-37
**
*Step, name=Step-37, nlgeom=YES, inc=10000
*Coupled Temperature-displacement, creep=none, deltmx=2000.
0.001, 0.125, 1e-07, 0.1
**
** INTERACTIONS
**
** Interaction: Int-37
*Model Change, add
P0_5MM-1.Set-37,
**
** OUTPUT REQUESTS
**
*Restart, write, frequency=0
**
** FIELD OUTPUT: F-Output-1
**
*Output, field
*Node Output
NT, RFL, U
*Element Output, directions=YES
HFL, S
*Contact Output
CDISP, CSTRESS
**
** HISTORY OUTPUT: H-Output-1
**
*Output, history, variable=PRESELECT
*End Step
** ----------------------------------------------------------------
**
** STEP: Step-38
**
*Step, name=Step-38, nlgeom=YES, inc=10000
*Coupled Temperature-displacement, creep=none, deltmx=2000.
0.001, 0.125, 1e-07, 0.1
**
** INTERACTIONS
**
** Interaction: Int-38
*Model Change, add
P0_5MM-1.Set-38,
**
** OUTPUT REQUESTS
**
*Restart, write, frequency=0
**
** FIELD OUTPUT: F-Output-1
**
*Output, field
*Node Output
NT, RFL, U
*Element Output, directions=YES
HFL, S
*Contact Output
CDISP, CSTRESS
**
** HISTORY OUTPUT: H-Output-1
**
*Output, history, variable=PRESELECT
*End Step
** ----------------------------------------------------------------
**
** STEP: Step-39
**
*Step, name=Step-39, nlgeom=YES, inc=10000
*Coupled Temperature-displacement, creep=none, deltmx=2000.
0.001, 0.125, 1e-07, 0.1
**
** INTERACTIONS
**
** Interaction: Int-39
*Model Change, add
P0_5MM-1.Set-39,
**
** OUTPUT REQUESTS
**
*Restart, write, frequency=0
**
** FIELD OUTPUT: F-Output-1
**
*Output, field
*Node Output
NT, RFL, U
*Element Output, directions=YES
HFL, S
*Contact Output
CDISP, CSTRESS
**
** HISTORY OUTPUT: H-Output-1
**
*Output, history, variable=PRESELECT
*End Step
** ----------------------------------------------------------------
**
** STEP: Step-40
**
*Step, name=Step-40, nlgeom=YES, inc=10000
*Coupled Temperature-displacement, creep=none, deltmx=2000.
0.001, 0.125, 1e-07, 0.1
**
** INTERACTIONS
**
** Interaction: Int-40
*Model Change, add
P0_5MM-1.Set-40,
**
** OUTPUT REQUESTS
**
*Restart, write, frequency=0
**
** FIELD OUTPUT: F-Output-1
**
*Output, field
*Node Output
NT, RFL, U
*Element Output, directions=YES
HFL, S
*Contact Output
CDISP, CSTRESS
**
** HISTORY OUTPUT: H-Output-1
**
*Output, history, variable=PRESELECT
*End Step
** ----------------------------------------------------------------
**
** STEP: cooling
**
*Step, name=cooling, nlgeom=YES, inc=10000
*Coupled Temperature-displacement, creep=none, deltmx=2000.
0.1, 30., 0.0003, 1.
**
** BOUNDARY CONDITIONS
**
** Name: fixed Type: Displacement/Rotation
*Boundary, op=NEW
fixed-re, 1, 1
fixed-re, 2, 2
fixed-re, 3, 3
** Name: side-weld-1 Type: Displacement/Rotation
*Boundary, op=NEW
** Name: side-weld-2 Type: Displacement/Rotation
*Boundary, op=NEW
** Name: weld Type: Displacement/Rotation
*Boundary, op=NEW
**
** INTERACTIONS
**
** Interaction: Int-100
*Model Change, remove
weld,
**
** OUTPUT REQUESTS
**
*Restart, write, frequency=0
**
** FIELD OUTPUT: F-Output-1
**
*Output, field
*Node Output
NT, RFL, U
*Element Output, directions=YES
HFL, S
*Contact Output
CDISP, CSTRESS
**
** HISTORY OUTPUT: H-Output-1
**
*Output, history, variable=PRESELECT
*End Step
** ----------------------------------------------------------------
**
** STEP: unflatten
**
*Step, name=unflatten, nlgeom=YES, inc=10000
*Coupled Temperature-displacement, creep=none, deltmx=2000.
0.01, 1., 1e-10, 0.1
**
** BOUNDARY CONDITIONS
**
** Name: BC-6 Type: Displacement/Rotation
*Boundary
center, 3, 3, 0.002
**
** OUTPUT REQUESTS
**
*Restart, write, frequency=0
**
** FIELD OUTPUT: F-Output-1
**
*Output, field
*Node Output
NT, RFL, U
*Element Output, directions=YES
HFL, S
*Contact Output
CDISP, CSTRESS
**
** HISTORY OUTPUT: H-Output-1
**
*Output, history, variable=PRESELECT
*End Step
